# ----------- Basic setup ----
atom_style      atomic
units           metal
dimension       3
boundary        p p p
processors      * * *

atom_modify	map hash
read_data       data.forces

#----------- Define potential and useful quantities ----
pair_style	lj/cut 8.5
pair_coeff	* * 0.01042332 3.4

timestep        0.0043				##In picoseconds
thermo          1000

variable 	Vac equal 40.00
variable	NX equal lx-${Vac}
print		${NX}


#---------------- Define the interface -----------------
variable        xmid equal 156.5743 #coordinate of interface; must match exactly for forces and vels
variable        dmid equal 5.38

variable 	xmidL equal ${xmid}-0.075 	##Small buffer to avoid double counting
variable	xmidR equal ${xmid}+0.075
variable 	xmidlo equal ${xmidL}-${dmid}
variable 	xmidhi equal ${xmidR}+${dmid}

region 		left block ${xmidlo} ${xmidL} INF INF INF INF  units box
region 		right block ${xmidR} ${xmidhi} INF INF INF INF  units box
group 		interface_left region left
group 		interface_right region right
group 		interface union interface_left interface_right

print 		'The interface is at ${xmidlo}, ${xmid}, ${xmidhi}'


#------------------Compute Forces on atoms--------------------------------------

compute 	fxfyfz interface property/atom fx fy fz

compute 	fxs interface property/atom fx
compute 	fys interface property/atom fy
compute 	fzs interface property/atom fz

#-------------------------- run 0 ------------------------------------------------

fix 		NVE all nve

variable 	N equal "count(all)"
variable	NL equal "count(interface_left)"
variable 	NR equal "count(interface_right)"

#----------------------------Initialize groups--------------------------------------

group 		thisi id 1

variable 	hstep equal 0.01 # Amount of displacement
variable 	hstepm2 equal -2*v_hstep

variable	filetowrite string Fij.dat
shell 		rm ${filetowrite}

dump 		helpdump interface custom 1 ${filetowrite} id c_fxs c_fys c_fzs
dump_modify 	helpdump sort id
dump_modify 	helpdump append yes

#---------------- WRITE THE INTERFACE PARTICLES IDs and TYPEs TO ${filetowrite}---------

print 		"NL ${NL}" append ${filetowrite}
print 		"NR ${NR}" append ${filetowrite}

label 		loop1
variable 	i1 loop $N
        variable 	xi equal x[${i1}]
        variable 	boolleft equal (${xi}<=${xmidL})&&(${xi}>=${xmidlo})
        variable 	boolright equal (${xi}>=${xmidR})&&(${xi}<=${xmidhi})
        if 		"${boolleft}" then &
                		"print '${i1} 1' append ${filetowrite}"
        if 		"${boolright}" then &
                		"print '${i1} 2' append ${filetowrite}"
        next 		i1

jump 		SELF loop1


#-----------------------------------------------------------------------------

print 		"HSTEP ${hstep}" append ${filetowrite}
thermo_modify 	flush yes

variable 	counter equal 0

label 		loop_i

variable 	i loop $N
         variable 	xi equal x[${i}]
         variable 	boolleft equal (${xi}<=${xmidL})&&(${xi}>=${xmidlo})
         variable 	boolright equal (${xi}>=${xmidR})&&(${xi}<=${xmidhi})
         print 		'$i ${boolleft} ${boolright}'
         if 		"!${boolleft}" then &
           			"next i" &
            			"jump SELF loop_i" &
            			"jump SELF final_break"

         group 		thisi delete
         group 		thisi id $i

         #---------------- X DIRECTION DISPLACEMENTS TO POSITIVE AND NEGATIVE DIRECTION-------------------

         displace_atoms 	thisi move ${hstep} 0 0
         variable 		counter equal ${counter}+1
         reset_timestep 	${counter}
         print 			"counter=${counter}"
         run 			0 # Update the forces in the compute

         displace_atoms 	thisi move ${hstepm2} 0 0
         variable 		counter equal ${counter}+1
         reset_timestep 	${counter}
         print 			"counter=${counter}"
         run 			0 # Update the forces in the compute

         displace_atoms 	thisi move ${hstep} 0 0

         #---------------- Y DIRECTION DISPLACEMENTS TO POSITIVE AND NEGATIVE DIRECTION---------------------

         displace_atoms 	thisi move 0 ${hstep} 0
         variable 		counter equal ${counter}+1
         reset_timestep 	${counter}
         print 			"counter=${counter}"
         run 			0 # Update the forces in the compute

         displace_atoms 	thisi move 0 ${hstepm2} 0
         variable 		counter equal ${counter}+1
         reset_timestep 	${counter}
         print 			"counter=${counter}"
         run 			0 # Update the forces in the compute

         displace_atoms 	thisi move 0 ${hstep} 0

         #--------------- Z DIRECTION DISPLACEMENTS TO POSITIVE AND NEGATIVE DIRECTION----------------------

         displace_atoms 	thisi move 0 0 ${hstep}
         variable 		counter equal ${counter}+1
         reset_timestep 	${counter}
         print 			"counter=${counter}"
         run 			0 # Update the forces in the compute

         displace_atoms 	thisi move 0 0 ${hstepm2}
         variable 		counter equal ${counter}+1
         reset_timestep 	${counter}
         print 			"counter=${counter}"
         run 			0 # Update the forces in the compute

         displace_atoms 	thisi move 0 0 ${hstep}

next 		i
jump 		SELF loop_i
label 		final_break
print 		"all done"
