#----------- Global declaration ----
variable        T       equal 300           # Kelvin
variable        kB      equal 8.6173324e-5  # [eV/K] Boltzmann
variable        A2m     equal 1.0e-10
variable        ps2s    equal 1.0e-12
variable        eV2J    equal 1.60217646e-19
variable        convert equal ${eV2J}/${A2m}/${A2m}/${ps2s}

# ----------- Basic setup ----
atom_style      atomic
units           metal
dimension       3
boundary        p p p
processors      * 1 1

read_data       data.vels

#----------- Define potential and useful quantities ----
pair_style      tersoff				##Potential
pair_coeff      * * SiCGe.tersoff Si(D)

timestep        0.0005				##1 fs timestep
thermo          2000

variable	T equal 300
variable	dT equal 40
variable	TR equal $T-${dT}/2
variable	TL equal $T+${dT}/2

variable        Vac equal 40.00
variable        NX equal lx-${Vac}
print           ${NX}
variable        x_min equal (xlo+${Vac}/2)
print           ${x_min}
variable        x_max equal (xhi-${Vac}/2)
print           ${x_max}

variable	lSlab equal 1.4
variable	siFixed equal 5.4
variable	siBath equal 22
variable	geFixed equal 5.4
variable	geBath equal 22

# ----------- Fix some atoms to avoid drift ----      #Width of block with fixed atoms
variable	x1 equal ${x_min}+${siFixed}
variable	x2 equal ${x_max}-${geFixed}
variable	x3 equal ${x1}+${siBath}
variable	x4 equal ${x2}-${geBath}
region          fixed1 block INF ${x1} INF INF INF INF	#Atoms in the block are fixed
region          fixed2 block ${x2} INF INF INF INF INF	#Atoms in the other end also fixed
region          fixed  union 2 fixed1 fixed2
group           gfixed region fixed				#All fixed atoms
group           gmoves subtract all gfixed			#Rest of the atoms move


############################# Velocity groups #################################################
#------- Interface ----------
variable        xinter equal 53.563 #coordinate of interface; must match exactly for forces and vels
variable        dmid equal 5.5
variable        xmid equal ${xinter}
variable        xmidL equal ${xmid}-0.075
variable        xmidR equal ${xmid}+0.075
variable        xmidlo equal ${xmid}-${dmid}
variable        xmidhi equal ${xmid}+${dmid}

region          left block ${xmidlo} ${xmidL} INF INF INF INF units box
region          right block ${xmidR} ${xmidhi} INF INF INF INF units box
group           interface_left region left
group           interface_right region right
group           interface union interface_left interface_right


###########################################################################################
# ----------- Define cold reservoir ----	#Total width of fixed atoms + reservoir atoms
region          cold block ${x4} ${x2} INF INF INF INF		#Atoms in the cold reservoir
group           gcold region cold

# ----------- Define hot reservoir ----
region          hot block ${x1} ${x3} INF INF INF INF	#Atoms in the end slab in the hot reservoir
group           ghot region hot


######
#group		blocks union gfixed ghot gcold interface		#For checking the region definitions
#dump		blocks blocks atom 10 blocks.lammpstrj  #For checking the region definitions
######

# ----------- Distance between reservoirs -----------
variable        Length equal ${NX}-(${siFixed}+${siBath}+${geFixed}+${geBath})			#First and last slab act as reservoirs
print           "!Length = ${Length} A"
variable	Lengthx equal lx
print		"!lx = ${Lengthx} A"
variable        Lengthcellx equal ${lSlab}
print           "!lcellx = ${Lengthcellx} A"
# ----------- Cross section area -----------
variable        Area    equal ly*lz
print           "!Area = ${Area} A^2"
# ----------- Real volume occupied by atoms excluding reservoirs ------
variable    	Volume  equal lx*ly*lz
print       	"!Volume = Lx*Ly*Lz = ${Volume} A^3"


# ----------- Print structure ----------------
dump            snap all atom 10000 snap.lammpstrj

# ----------- Initialize velocities ----------------
velocity        gmoves create ${T} ${SEED} mom yes rot yes dist gaussian	##The moving atoms assigned velocities in a gaussian distrn
velocity	gfixed set 0.0 0.0 0.0 units box

# ----------- Compute real temperature excluding frozen atoms --
compute         real_temp gmoves temp

# ----------- Equilibration and thermalization ----------------

variable        Tis atom ${TL}-x/xhi*${dT} #ty's addition
fix		NVT gmoves langevin v_Tis 1.0 $(100*dt) ${SEED} #ty's addition
fix		NVE gmoves nve
fix		FREEZE gfixed setforce 0.0 0.0 0.0
thermo_style	custom step temp c_real_temp pe etotal press pxx pyy pzz
thermo_modify	flush yes
run		500000
unfix           NVT
write_restart   restart.NVT.*


#fix		NVT gmoves nvt temp $T $T $(100*dt) tchain 10
#fix		FREEZE gfixed setforce 0.0 0.0 0.0
#thermo_style	custom step temp c_real_temp pe etotal press pxx pyy pzz
#thermo_modify	flush yes
#run		500000
#unfix           NVT
#write_restart   restart.NVT.*
#fix             NVE gmoves nve
#run             500000


# ----------- Start NEMD and calculate Temp profile -------
restart         500000 restart
reset_timestep	1

fix		LTC gcold langevin ${TR} ${TR} 0.1 ${langSEED} tally yes zero yes
fix		LTH ghot  langevin ${TL} ${TL} 0.1 ${langSEED} tally yes zero yes

variable	HFluxO equal f_LTC/v_Area/step/dt*v_convert
variable	HFluxI equal f_LTH/v_Area/step/dt*v_convert

thermo_style	custom step temp c_real_temp pe etotal press pxx pyy pzz f_LTC f_LTH v_HFluxO v_HFluxI
thermo_modify	flush yes

compute		ke gmoves ke/atom
variable 	temp atom c_ke/1.5/v_kB
compute         cc1 gmoves chunk/atom bin/1d x lower ${lSlab} bound x ${lSlab} ${x2} units box
compute         cc2 gmoves chunk/atom bin/1d x lower ${lSlab} bound x ${lSlab} ${x2} units box
fix 		cc1_T gmoves ave/chunk 1 200000 200000 cc1 v_temp file tmp.profile.0

run 		4194304 			#2**22
write_restart   restart.*

fix		cc2_T gmoves ave/chunk 1 200000 200000 cc2 v_temp file tmp.profile.final

#################### Collect Velocities ############################
#---- Interface -------
variable	dt_dump equal 16 		#2**4
dump            vels interface custom ${dt_dump} interface.vels.dat id type vx vy vz
dump_modify     vels format line "%d %d %0.8g %0.8g %0.8g"
dump_modify     vels sort id

dump            pos interface custom 1000 interface.pos.dat id type x y z
dump_modify     pos format line "%d %d %0.8g %0.8g %0.8g"
dump_modify     pos sort id

run             4194304      			#2**22
write_restart	restart.final.*
undump          snap
